<?xml version="1.0"?>

<!-- Generated by Aero-Matic v 0.7
     Fixed by Ron Jensen

     Inputs:
       horsepower:   3.8
       pitch:        fixed
     Outputs:
       linear-blade-inches: 10.331602005498
-->

<propeller name="prop">
  <ixx> 1.25e-3 </ixx>
  <diameter unit="IN"> 18.0 </diameter>
  <numblades> 2 </numblades>
  <minpitch> 30 </minpitch>
  <maxpitch> 30 </maxpitch>
  <gearratio> 1 </gearratio>
  <ct_factor> 4.0 </ct_factor>
  <cp_factor> 1.0 </cp_factor>

  <table name="C_THRUST" type="internal">
    <tableData>
-1.0	0.0850
-0.9	0.0900
-0.8	0.0950
-0.7	0.1000
-0.6	0.0968
-0.5	0.0936
-0.4	0.0904
-0.3	0.0872
-0.2	0.0840
-0.1	0.0808
0.0	0.0776
0.1	0.0744
0.2	0.0712
0.3	0.0655
0.4	0.0588
0.5	0.0518
0.6	0.0419
0.7	0.0318
0.8	0.0172
1.0	0.0006
1.4	-0.0072
    </tableData>
  </table>

  <table name="C_POWER" type = "internal">
    <tableData>
-1.0	0.0992
-0.9	0.0983
-0.8	0.0974
-0.7	0.0965
-0.6	0.0956
-0.5	0.0947
-0.4	0.0938
-0.3	0.0929
-0.2	0.0920
-0.1	0.0911
0.0	0.0902
0.1	0.0893
0.2	0.0880
0.3	0.0860
0.4	0.0810
0.5	0.0742
0.6	0.0681
0.7	0.0572
0.8	0.0467
1.0	0.0167
1.4	-0.0467
    </tableData>
  </table>

</propeller>
